# 1 задание
f(x) := 2*(x^4) - 3*x^2 + 75*x - 10000
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x1 := root(f(x), x, -10, 0) = -8.58519
x2 := root(f(x), x, 0, 10) = 8.32004
v := f(x) coeffs → [-10000; 75; -3; 0; 2]
f(x) solve; assume, x == real → [
    sqrt(239991*sqrt(9*(512241118786277/1728 - 25825*sqrt(2458040450271)/4)^(1/3) + 9*(25*sqrt(2458040450271)/72 - 9297)^(1/3) - 239991/4)/4 - 9*(512241118786277/1728 - 25825*sqrt(2458040450271)/4)^(1/3)*sqrt(9*(512241118786277/1728 - 25825*sqrt(2458040450271)/4)^(1/3) + 9*(25*sqrt(2458040450271)/72 - 9297)^(1/3) - 239991/4) + 225*sqrt(225*sqrt(2458040450271)/2 - 3012228)/2 + 18*(25*sqrt(2458040450271)/72 - 9297)^(1/3)*sqrt(9*(512241118786277/1728 - 25825*sqrt(2458040450271)/4)^(1/3) + 9*(25*sqrt(2458040450271)/72 - 9297)^(1/3) - 239991/4))/(6*(25*sqrt(2458040450271)/72 - 9297)^(1/6)*(9*(512241118786277/1728 - 25825*sqrt(2458040450271)/4)^(1/3) + 9*(25*sqrt(2458040450271)/72 - 9297)^(1/3) - 239991/4)^(1/4)) - sqrt(9*(512241118786277/1728 - 25825*sqrt(2458040450271)/4)^(1/3) + 9*(25*sqrt(2458040450271)/72 - 9297)^(1/3) - 239991/4)/(6*(25*sqrt(2458040450271)/72 - 9297)^(1/6));
    -((9*(512241118786277/1728 - 25825*sqrt(2458040450271)/4)^(1/3) + 9*(25*sqrt(2458040450271)/72 - 9297)^(1/3) - 239991/4)^(3/4) + sqrt(239991*sqrt(9*(512241118786277/1728 - 25825*sqrt(2458040450271)/4)^(1/3) + 9*(25*sqrt(2458040450271)/72 - 9297)^(1/3) - 239991/4)/4 - 9*(512241118786277/1728 - 25825*sqrt(2458040450271)/4)^(1/3)*sqrt(9*(512241118786277/1728 - 25825*sqrt(2458040450271)/4)^(1/3) + 9*(25*sqrt(2458040450271)/72 - 9297)^(1/3) - 239991/4) + 225*sqrt(225*sqrt(2458040450271)/2 - 3012228)/2 + 18*(25*sqrt(2458040450271)/72 - 9297)^(1/3)*sqrt(9*(512241118786277/1728 - 25825*sqrt(2458040450271)/4)^(1/3) + 9*(25*sqrt(2458040450271)/72 - 9297)^(1/3) - 239991/4)))/(6*(25*sqrt(2458040450271)/72 - 9297)^(1/6)*(9*(512241118786277/1728 - 25825*sqrt(2458040450271)/4)^(1/3) + 9*(25*sqrt(2458040450271)/72 - 9297)^(1/3) - 239991/4)^(1/4))
] = [8.32004; -8.58519]
90
polyroots(v) = [-8.58519; 0.132576 - 8.36552i; 0.132576 + 8.36552i; 8.32004]
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# 3 задание
A := [2.36, 2.37, 2.13; 2.51, 2.40, 2.10; 2.59, 2.41, 2.06]
B := [1.48; 1.92; 2.16]
X := A^-1*B = [3.86373; -3.89935; 0.752616]
lsolve(A, B) = [3.86373; -3.89935; 0.752616]
Given
x[0] := 0
x[1] := 0
x[2] := 0
2.36*x[0] + 2.37*x[1] + 2.13*x[2] == 1.48
2.51*x[0] + 2.40*x[1] + 2.10*x[2] == 1.92
2.59*x[0] + 2.41*x[1] + 2.06*x[2] == 2.16
res := Find(x)
res = [3.86373; -3.89935; 0.752616]
# 2 задание
n := 10
i := 1, 2 .. 2*n
K[i] := (2*π*i)/(2*n + 1)
Y := [2980.1; 2089.3; 742.4; 146.6; 18.6; 1.8; 0.16; 0.02; 0.003; 0.001; 0.001; 0.001; 0.002; 0.003; 0.018; 0.9; 1.22; 18.6; 146.6; 742.5; 2089.7]
K = [0; 0.299199; 0.598399; 0.897598; 1.1968; 1.496; 1.7952; 2.0944; 2.39359; 2.69279; 2.99199; 3.29119; 3.59039; 3.88959; 4.18879; 4.48799; 4.78719; 5.08639; 5.38559; 5.68479; 5.98399]
# кусочно линейная интерполяция
scale := 100
j := 0 .. scale
t[j] := min(X) + j*(max(K) - min(K))/scale
fintl(t) := linterp(K, Y, t)
# интерполяция кубическим сплайном
S := cspline(K, Y)
fints(t) := interp(S, K, Y, t)
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# 4 задание
S(n) :=
    sum1 ← 0
    sum2 ← 0
    for i ∈ 1 .. n
        sum1 ← sum1 + i^2
        sum2 ← sum2 + i
    sum2^2 - sum1
S(10) = 2640
